*Heading
** Job name: Axisymmetric-Explicit Model name: AxisymmetricExplicit
** Generated by: Abaqus/CAE 2019
*Preprint, echo=NO, model=NO, history=NO, contact=NO
**
** PARTS
**
*Part, name=Part-1
*Node
      1,           0.,          10.
      2,           0.,           9.
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*Element, type=CAX4R
 1,  1,  2, 13, 12
 2,  2,  3, 14, 13
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*Nset, nset=_PickedSet2, internal, generate
  1,  66,   1
*Elset, elset=_PickedSet2, internal, generate
  1,  50,   1
** Section: Section-1
*Solid Section, elset=_PickedSet2, material=CP
,
*End Part
**
**
** ASSEMBLY
**
*Assembly, name=Assembly
**
*Instance, name=Part-1-1, part=Part-1
*End Instance
**
*Node
      1,           0.,          15.,           0.
*Nset, nset=RP
 1,
*Nset, nset=_PickedSet6, internal
 1,
*Nset, nset=_PickedSet7, internal, instance=Part-1-1, generate
  1,  11,   1
*Elset, elset=_PickedSet7, internal, instance=Part-1-1, generate
  1,  10,   1
*Nset, nset=_PickedSet8, internal, instance=Part-1-1, generate
 11,  66,  11
*Elset, elset=_PickedSet8, internal, instance=Part-1-1, generate
 10,  50,  10
*Nset, nset=_PickedSet9, internal
 1,
*Elset, elset=__PickedSurf5_S4, internal, instance=Part-1-1, generate
  1,  41,  10
*Surface, type=ELEMENT, name=_PickedSurf5, internal
__PickedSurf5_S4, S4
** Constraint: Constraint-1
*Coupling, constraint name=Constraint-1, ref node=_PickedSet6, surface=_PickedSurf5
*Kinematic
*End Assembly
*Amplitude, name=Amp-1, definition=SMOOTH STEP
             0.,              0.,              1.,              1.
**
** MATERIALS
**
*include, input=material.inp
**
** BOUNDARY CONDITIONS
**
** Name: Axisym Type: Symmetry/Antisymmetry/Encastre
*Boundary
_PickedSet7, XSYMM
** Name: Fix Type: Displacement/Rotation
*Boundary
_PickedSet8, 2, 2
_PickedSet8, 6, 6
** ----------------------------------------------------------------
**
** STEP: Load
**
*Step, name=Load, nlgeom=YES
*Dynamic, Explicit
, 100.
*Bulk Viscosity
0.06, 1.2
** Mass Scaling: Semi-Automatic
**               Whole Model
*Fixed Mass Scaling, dt=0.0001, type=uniform
**
** BOUNDARY CONDITIONS
**
** Name: Load Type: Velocity/Angular velocity
*Boundary, amplitude=Amp-1, type=VELOCITY
_PickedSet9, 1, 1
_PickedSet9, 2, 2, 0.05
_PickedSet9, 6, 6
**
** OUTPUT REQUESTS
**
*Restart, write, number interval=1, time marks=NO
**
** FIELD OUTPUT: F-Output-1
**
*Output, field
*Node Output
U,
*Element Output, directions=YES
LE, S, SDV, STATUS
**
** HISTORY OUTPUT: H-Output-2
**
*Output, history, time interval=0.1
*Node Output, nset=RP
RF2, U2
**
** HISTORY OUTPUT: H-Output-1
**
*Output, history, variable=PRESELECT, time interval=0.1
*End Step
