*Heading
** Job name: Axisymmetric-Implicit Model name: AxisymmetricImplicit
** Generated by: Abaqus/CAE 2019
*Preprint, echo=NO, model=NO, history=NO, contact=NO
**
** PARTS
**
*Part, name=Part-1
*Node
      1,           0.,          10.
      2,           0.,           9.
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*Element, type=CAX4R
 1,  1,  2, 13, 12
 2,  2,  3, 14, 13
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*Nset, nset=_PickedSet2, internal, generate
  1,  66,   1
*Elset, elset=_PickedSet2, internal, generate
  1,  50,   1
** Section: Section-1
*Solid Section, elset=_PickedSet2, controls=EC-1, material=CP
,
*End Part
**
**
** ASSEMBLY
**
*Assembly, name=Assembly
**
*Instance, name=Part-1-1, part=Part-1
*End Instance
**
*Node
      1,           0.,          15.,           0.
*Nset, nset=RP
 1,
*Nset, nset=_PickedSet6, internal
 1,
*Nset, nset=_PickedSet7, internal, instance=Part-1-1, generate
  1,  11,   1
*Elset, elset=_PickedSet7, internal, instance=Part-1-1, generate
  1,  10,   1
*Nset, nset=_PickedSet8, internal, instance=Part-1-1, generate
 11,  66,  11
*Elset, elset=_PickedSet8, internal, instance=Part-1-1, generate
 10,  50,  10
*Nset, nset=_PickedSet9, internal
 1,
*Elset, elset=__PickedSurf5_S4, internal, instance=Part-1-1, generate
  1,  41,  10
*Surface, type=ELEMENT, name=_PickedSurf5, internal
__PickedSurf5_S4, S4
** Constraint: Constraint-1
*Coupling, constraint name=Constraint-1, ref node=_PickedSet6, surface=_PickedSurf5
*Kinematic
*End Assembly
**
** ELEMENT CONTROLS
**
*Section Controls, name=EC-1, hourglass=ENHANCED
1., 1., 1.
*Amplitude, name=Amp-1, definition=SMOOTH STEP
             0.,              0.,              1.,              1.
**
** MATERIALS
**
*include, input=material.inp
**
** BOUNDARY CONDITIONS
**
** Name: Axisym Type: Symmetry/Antisymmetry/Encastre
*Boundary
_PickedSet7, XSYMM
** Name: Fix Type: Displacement/Rotation
*Boundary
_PickedSet8, 2, 2
_PickedSet8, 6, 6
** ----------------------------------------------------------------
**
** STEP: Load
**
*Step, name=Load, nlgeom=YES, inc=100000
*Static
0.1, 100., 0.001, 0.1
**
** BOUNDARY CONDITIONS
**
** Name: Load Type: Velocity/Angular velocity
*Boundary, amplitude=Amp-1, type=VELOCITY
_PickedSet9, 1, 1
_PickedSet9, 2, 2, 0.05
_PickedSet9, 6, 6
**
** OUTPUT REQUESTS
**
*Restart, write, number interval=1, time marks=NO
**
** FIELD OUTPUT: F-Output-1
**
*Output, field, number interval=20, time marks=NO
*Node Output
U,
*Element Output, directions=YES
LE, S, SDV, STATUS
**
** HISTORY OUTPUT: H-Output-2
**
*Output, history, number interval=1000, time marks=NO
*Node Output, nset=RP
RF2, U2
**
** HISTORY OUTPUT: H-Output-1
**
*Output, history, variable=PRESELECT, number interval=1000, time marks=NO
*End Step
