*Heading
** Job name: PlaneStrain-Implicit Model name: PlaneStrainImplicit
** Generated by: Abaqus/CAE 2019
*Preprint, echo=NO, model=NO, history=NO, contact=NO
**
** PARTS
**
*Part, name=Part-1
*Node
      1,           0.,           0.
      2,           1.,           0.
      3,           0.,           1.
      4,           1.,           1.
*Element, type=CPE4R
1, 1, 2, 4, 3
*Nset, nset=_PickedSet2, internal, generate
 1,  4,  1
*Elset, elset=_PickedSet2, internal
 1,
*Nset, nset=BL
 1,
*Nset, nset=BR
 2,
*Nset, nset=TL
 3,
*Nset, nset=TR
 4,
*Nset, nset=element, generate
 1,  4,  1
*Elset, elset=element
 1,
** Section: Section-1
*Solid Section, elset=_PickedSet2, controls=EC-1, material=CP
1.,
*End Part
**
**
** ASSEMBLY
**
*Assembly, name=Assembly
**
*Instance, name=Part-1-1, part=Part-1
*End Instance
**
*Nset, nset=_PickedSet4, internal, instance=Part-1-1
 1,
*Nset, nset=_PickedSet5, internal, instance=Part-1-1
 2,
** Constraint: Constraint-1
*Equation
4
Part-1-1.TL, 1, 1.
Part-1-1.TR, 1, -1.
Part-1-1.BL, 1, -1.
Part-1-1.BR, 1, 1.
** Constraint: Constraint-2
*Equation
4
Part-1-1.TL, 2, 1.
Part-1-1.BL, 2, -1.
Part-1-1.TR, 2, -1.
Part-1-1.BR, 2, 1.
*End Assembly
**
** ELEMENT CONTROLS
**
*Section Controls, name=EC-1, hourglass=ENHANCED
1., 1., 1.
*Amplitude, name=Amp-1, definition=SMOOTH STEP
             0.,              0.,              1.,              1.
**
** MATERIALS
**
*include, input=material.inp
**
** BOUNDARY CONDITIONS
**
** Name: Fix Type: Displacement/Rotation
*Boundary
_PickedSet4, 1, 1
_PickedSet4, 2, 2
** ----------------------------------------------------------------
**
** STEP: Load
**
*Step, name=Load, nlgeom=YES, inc=100000
*Static
0.1, 100., 0.001, 0.1
**
** BOUNDARY CONDITIONS
**
** Name: Load Type: Velocity/Angular velocity
*Boundary, amplitude=Amp-1, type=VELOCITY
_PickedSet5, 1, 1, 0.01
_PickedSet5, 2, 2
**
** OUTPUT REQUESTS
**
*Restart, write, number interval=1, time marks=NO
**
** FIELD OUTPUT: F-Output-1
**
*Output, field, number interval=20, time marks=NO
*Node Output
U,
*Element Output, directions=YES
LE, S, SDV, STATUS
**
** HISTORY OUTPUT: H-Output-1
**
*Output, history, number interval=1000, time marks=NO
*Element Output, elset=Part-1-1.element
LE11, LE12, LE13, LE22, LE23, LE33, MISES, S11, S12, S13, S22, S23, S33, SDV, STATUS
*End Step
