*Heading
** Job name: PolycrystalTension-Explicit Model name: Model-1
** Generated by: Abaqus/CAE 2019
*Preprint, echo=NO, model=NO, history=NO, contact=NO
**
** PARTS
**
*Part, name=cube
*Node
      1,           0.,           0.,          0.5
      2,           0.,  0.100000001,          0.5
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*Element, type=C3D8R
  1,  37,  38,  44,  43,   1,   2,   8,   7
  2,  38,  39,  45,  44,   2,   3,   9,   8
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*Nset, nset=_PickedSet2, internal, generate
   1,  216,    1
*Elset, elset=_PickedSet2, internal, generate
   1,  125,    1
*Nset, nset=X0, generate
  1,  36,   1
*Elset, elset=X0, generate
  1,  25,   1
*Nset, nset=disp
 211,
** Section: Section-1
*Solid Section, elset=_PickedSet2, material=AL
,
*End Part
**
**
** ASSEMBLY
**
*Assembly, name=Assembly
**
*Instance, name=cube-1, part=cube
*End Instance
**
*Nset, nset=_PickedSet4, internal, instance=cube-1
  31,  32,  33,  34,  35,  36
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*Elset, elset=_PickedSet4, internal, instance=cube-1
  21,  22,  23,  24,  25,  46
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*Nset, nset=_PickedSet5, internal, instance=cube-1, generate
  1,  36,   1
*Elset, elset=_PickedSet5, internal, instance=cube-1, generate
  1,  25,   1
*Nset, nset=_PickedSet6, internal, instance=cube-1, generate
   1,  211,    6
*Elset, elset=_PickedSet6, internal, instance=cube-1, generate
   1,  121,    5
*Nset, nset=_PickedSet8, internal, instance=cube-1, generate
 181,  216,    1
*Elset, elset=_PickedSet8, internal, instance=cube-1, generate
 101,  125,    1
**------------------------------------------------------------------------------
** Element sets
**------------------------------------------------------------------------------
*Elset, elset=Grain-Set-1-1, instance=PART-1-1
 1
*Elset, elset=Grain-Set-1-2, instance=PART-1-1
 2
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*End Assembly
*Amplitude, name=Amp-1, definition=SMOOTH STEP
             0.,              0.,              1.,              1.
**
** MATERIALS
**
*include, input=material.inp
**------------------------------------------------------------------------------
** History card: define Euler angles
**------------------------------------------------------------------------------
*Initial conditions, type=SOLUTION
** elset, phi1, PHI, phi2
Grain-Set-1-1,  21.46, 100.75,  37.74, 0, 0, 0, 0
 0, 0, 0, 0, 0, 0, 0, 0
 0, 0, 0, 0, 0, 0, 0, 0
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 0
**
** BOUNDARY CONDITIONS
**
** Name: SymX Type: Symmetry/Antisymmetry/Encastre
*Boundary
_PickedSet5, XSYMM
** Name: SymY Type: Symmetry/Antisymmetry/Encastre
*Boundary
_PickedSet6, YSYMM
** Name: SymZ Type: Symmetry/Antisymmetry/Encastre
*Boundary
_PickedSet4, ZSYMM
** ----------------------------------------------------------------
**
** STEP: Load
**
*Step, name=Load, nlgeom=YES
*Dynamic, Explicit
, 1000.
*Bulk Viscosity
0.06, 1.2
** Mass Scaling: Semi-Automatic
**               Whole Model
*Fixed Mass Scaling, dt=0.002, type=uniform
**
** BOUNDARY CONDITIONS
**
** Name: Loading Type: Velocity/Angular velocity
*Boundary, amplitude=Amp-1, type=VELOCITY
_PickedSet8, 1, 1, 0.0005
**
** OUTPUT REQUESTS
**
*Restart, write, number interval=1, time marks=NO
**
** FIELD OUTPUT: F-Output-1
**
*Output, field
*Node Output
U,
*Element Output, directions=YES
S, SDV, STATUS
**
** HISTORY OUTPUT: H-Output-2
**
*Output, history, time interval=1.
*Node Output, nset=cube-1.X0
RF1,
**
** HISTORY OUTPUT: H-Output-3
**
*Node Output, nset=cube-1.disp
U1,
**
** HISTORY OUTPUT: H-Output-1
**
*Output, history, variable=PRESELECT, time interval=1.
*End Step
