*Heading
** Job name: PolycrystalTension-Implicit Model name: Model-implicit
** Generated by: Abaqus/CAE 2019
*Preprint, echo=NO, model=NO, history=NO, contact=NO
**
** PARTS
**
*Part, name=cube
*Node
      1,           0.,           0.,          0.5
      2,           0.,  0.100000001,          0.5
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*Element, type=C3D8R
  1,  37,  38,  44,  43,   1,   2,   8,   7
  2,  38,  39,  45,  44,   2,   3,   9,   8
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*Nset, nset=_PickedSet2, internal, generate
   1,  216,    1
*Elset, elset=_PickedSet2, internal, generate
   1,  125,    1
*Nset, nset=X0, generate
  1,  36,   1
*Elset, elset=X0, generate
  1,  25,   1
*Nset, nset=disp
 211,
** Section: Section-1
*Solid Section, elset=_PickedSet2, controls=EC-1, material=AL
,
*End Part
**
**
** ASSEMBLY
**
*Assembly, name=Assembly
**
*Instance, name=cube-1, part=cube
*End Instance
**
*Nset, nset=_PickedSet4, internal, instance=cube-1
  31,  32,  33,  34,  35,  36
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*Elset, elset=_PickedSet4, internal, instance=cube-1
  21,  22,  23,  24,  25,  46
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*Nset, nset=_PickedSet5, internal, instance=cube-1, generate
  1,  36,   1
*Elset, elset=_PickedSet5, internal, instance=cube-1, generate
  1,  25,   1
*Nset, nset=_PickedSet6, internal, instance=cube-1, generate
   1,  211,    6
*Elset, elset=_PickedSet6, internal, instance=cube-1, generate
   1,  121,    5
*Nset, nset=_PickedSet8, internal, instance=cube-1, generate
 181,  216,    1
*Elset, elset=_PickedSet8, internal, instance=cube-1, generate
 101,  125,    1
**------------------------------------------------------------------------------
** Element sets
**------------------------------------------------------------------------------
*Elset, elset=Grain-Set-1-1, instance=PART-1-1
 1
*Elset, elset=Grain-Set-1-2, instance=PART-1-1
 2
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*End Assembly
**
** ELEMENT CONTROLS
**
*Section Controls, name=EC-1, hourglass=ENHANCED
1., 1., 1.
*Amplitude, name=Amp-1, definition=SMOOTH STEP
             0.,              0.,              1.,              1.
**
** MATERIALS
**
*include, input=material.inp
**------------------------------------------------------------------------------
** History card: define Euler angles
**------------------------------------------------------------------------------
*Initial conditions, type=SOLUTION
** elset, phi1, PHI, phi2
Grain-Set-1-1,  21.46, 115.98, 265.08, 0, 0, 0, 0
 0, 0, 0, 0, 0, 0, 0, 0
 0, 0, 0, 0, 0, 0, 0, 0
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 0, 0, 0, 0, 0, 0, 1
**
** BOUNDARY CONDITIONS
**
** Name: SymX Type: Symmetry/Antisymmetry/Encastre
*Boundary
_PickedSet5, XSYMM
** Name: SymY Type: Symmetry/Antisymmetry/Encastre
*Boundary
_PickedSet6, YSYMM
** Name: SymZ Type: Symmetry/Antisymmetry/Encastre
*Boundary
_PickedSet4, ZSYMM
** ----------------------------------------------------------------
**
** STEP: Load
**
*Step, name=Load, nlgeom=YES, inc=10000000
*Static
1., 1000., 0.0001, 1.
*Solution Technique, type=QUASI-NEWTON
**
** BOUNDARY CONDITIONS
**
** Name: Loading Type: Velocity/Angular velocity
*Boundary, amplitude=Amp-1, type=VELOCITY
_PickedSet8, 1, 1, 0.0005
**
** OUTPUT REQUESTS
**
*Restart, write, number interval=1, time marks=NO
**
** FIELD OUTPUT: F-Output-1
**
*Output, field, number interval=20, time marks=NO
*Node Output
U,
*Element Output, directions=YES
S, SDV, STATUS
**
** HISTORY OUTPUT: H-Output-2
**
*Output, history, number interval=1000, time marks=NO
*Node Output, nset=cube-1.X0
RF1,
**
** HISTORY OUTPUT: H-Output-3
**
*Node Output, nset=cube-1.disp
U1,
**
** HISTORY OUTPUT: H-Output-1
**
*Output, history, variable=PRESELECT, number interval=1000, time marks=NO
*End Step
