*Heading
** Job name: SimpleShear Model name: Model-1
** Generated by: Abaqus/CAE 6.14-4
*Preprint, echo=NO, model=NO, history=NO, contact=NO
**
** PARTS
**
*Part, name=Part-1
*End Part
**
**
** ASSEMBLY
**
*Assembly, name=Assembly
**
*Instance, name=Part-1-1, part=Part-1
*Node
      1,           1.,           1.,           1.
      2,           1.,           0.,           1.
      3,           1.,           1.,           0.
      4,           1.,           0.,           0.
      5,           0.,           1.,           1.
      6,           0.,           0.,           1.
      7,           0.,           1.,           0.
      8,           0.,           0.,           0.
*Element, type=C3D8R
1, 5, 6, 8, 7, 1, 2, 4, 3
*Nset, nset=_PickedSet2, internal, generate
 1,  8,  1
*Elset, elset=_PickedSet2, internal
 1,
** Section: Section-1
*Solid Section, elset=_PickedSet2, controls=EC-1, material=Material-1
,
*End Instance
**
*Elset, elset=element, instance=Part-1-1
 1,
*Nset, nset=_PickedSet4, internal, instance=Part-1-1, generate
 2,  8,  2
*Elset, elset=_PickedSet4, internal, instance=Part-1-1
 1,
*Nset, nset=_PickedSet6, internal, instance=Part-1-1, generate
 1,  8,  1
*Elset, elset=_PickedSet6, internal, instance=Part-1-1
 1,
*Nset, nset=_PickedSet10, internal, instance=Part-1-1, generate
 1,  7,  2
*Elset, elset=_PickedSet10, internal, instance=Part-1-1
 1,
*End Assembly
**
** ELEMENT CONTROLS
**
*Section Controls, name=EC-1, hourglass=ENHANCED
1., 1., 1.
*Amplitude, name=Amp-1, definition=SMOOTH STEP
             0.,              0.,              1.,              1.
**
** MATERIALS
**
*include, input=material.inp
**
** BOUNDARY CONDITIONS
**
** Name: BC-3 Type: Displacement/Rotation
*Boundary
_PickedSet6, 3, 3
** Name: Fixed Type: Displacement/Rotation
*Boundary
_PickedSet4, 1, 1
_PickedSet4, 2, 2
_PickedSet4, 3, 3
** ----------------------------------------------------------------
**
** STEP: Step-1
**
*Step, name=Step-1, nlgeom=YES, inc=10000
*Static
0.1, 100., 0.001, 0.1
*Solution Technique, type=QUASI-NEWTON
**
** BOUNDARY CONDITIONS
**
** Name: SimpleShear Type: Velocity/Angular velocity
*Boundary, amplitude=Amp-1, type=VELOCITY
_PickedSet10, 1, 1, 0.01
_PickedSet10, 2, 2
**
** OUTPUT REQUESTS
**
*Restart, write, number interval=1, time marks=NO
**
** FIELD OUTPUT: F-Output-1
**
*Output, field, number interval=20, time marks=NO
*Node Output
RF, U, V
*Element Output, directions=YES
LE, PE, PEEQ, S, SDV
*Contact Output
CSTRESS,
**
** HISTORY OUTPUT: H-Output-2
**
*Output, history, number interval=1000, time marks=NO
*Element Output, elset=element
LE11, LE12, LE13, LE22, LE23, LE33, LEP, MISES, PEEQ, S11, S12, S13, S22, S23, S33, SDV
**
** HISTORY OUTPUT: H-Output-1
**
*Output, history, variable=PRESELECT, number interval=1000, time marks=NO
*End Step
