*Heading
** Job name: UniaxialTension-Explicit Model name: model_explicit
** Generated by: Abaqus/CAE 2019
*Preprint, echo=NO, model=NO, history=NO, contact=NO
**
** PARTS
**
*Part, name=PART-1
*Node
      1,           0.,           0.,           0.
      2,           1.,           0.,           0.
      3,           0.,           1.,           0.
      4,           1.,           1.,           0.
      5,           0.,           0.,           1.
      6,           1.,           0.,           1.
      7,           0.,           1.,           1.
      8,           1.,           1.,           1.
*Element, type=C3D8R
1, 1, 2, 4, 3, 5, 6, 8, 7
*Elset, elset=GRAIN-SET-1
 1,
** Section: Section-1-GRAIN-SET-1
*Solid Section, elset=GRAIN-SET-1, controls=EC-1, material=AL
,
*End Part
**
**
** ASSEMBLY
**
*Assembly, name=Assembly
**
*Instance, name=PART-1-1, part=PART-1
*End Instance
**
*Nset, nset=EqnSet-1, instance=PART-1-1
 6,
*Nset, nset=EqnSet-2, instance=PART-1-1
 8,
*Nset, nset=EqnSet-3, instance=PART-1-1
 1,
*Nset, nset=EqnSet-4, instance=PART-1-1
 3,
*Nset, nset=EqnSet-5, instance=PART-1-1
 7,
*Nset, nset=EqnSet-6, instance=PART-1-1
 8,
*Nset, nset=EqnSet-7, instance=PART-1-1
 1,
*Nset, nset=EqnSet-8, instance=PART-1-1
 2,
*Nset, nset=EqnSet-9, instance=PART-1-1
 5,
*Nset, nset=EqnSet-10, instance=PART-1-1
 6,
*Nset, nset=EqnSet-11, instance=PART-1-1
 1,
*Nset, nset=EqnSet-12, instance=PART-1-1
 2,
*Nset, nset=EqnSet-13, instance=PART-1-1
 4,
*Nset, nset=EqnSet-14, instance=PART-1-1
 3,
*Nset, nset=EqnSet-15, instance=PART-1-1
 1,
*Nset, nset=EqnSet-16, instance=PART-1-1
 2,
*Nset, nset=EqnSet-17, instance=PART-1-1
 6,
*Nset, nset=EqnSet-18, instance=PART-1-1
 8,
*Nset, nset=EqnSet-19, instance=PART-1-1
 1,
*Nset, nset=EqnSet-20, instance=PART-1-1
 3,
*Nset, nset=EqnSet-21, instance=PART-1-1
 7,
*Nset, nset=EqnSet-22, instance=PART-1-1
 8,
*Nset, nset=EqnSet-23, instance=PART-1-1
 1,
*Nset, nset=EqnSet-24, instance=PART-1-1
 2,
*Nset, nset=EqnSet-25, instance=PART-1-1
 5,
*Nset, nset=EqnSet-26, instance=PART-1-1
 6,
*Nset, nset=EqnSet-27, instance=PART-1-1
 1,
*Nset, nset=EqnSet-28, instance=PART-1-1
 2,
*Nset, nset=EqnSet-29, instance=PART-1-1
 4,
*Nset, nset=EqnSet-30, instance=PART-1-1
 3,
*Nset, nset=EqnSet-31, instance=PART-1-1
 1,
*Nset, nset=EqnSet-32, instance=PART-1-1
 2,
*Nset, nset=EqnSet-33, instance=PART-1-1
 6,
*Nset, nset=EqnSet-34, instance=PART-1-1
 8,
*Nset, nset=EqnSet-35, instance=PART-1-1
 1,
*Nset, nset=EqnSet-36, instance=PART-1-1
 3,
*Nset, nset=EqnSet-37, instance=PART-1-1
 7,
*Nset, nset=EqnSet-38, instance=PART-1-1
 8,
*Nset, nset=EqnSet-39, instance=PART-1-1
 1,
*Nset, nset=EqnSet-40, instance=PART-1-1
 2,
*Nset, nset=EqnSet-41, instance=PART-1-1
 5,
*Nset, nset=EqnSet-42, instance=PART-1-1
 6,
*Nset, nset=EqnSet-43, instance=PART-1-1
 1,
*Nset, nset=EqnSet-44, instance=PART-1-1
 2,
*Nset, nset=EqnSet-45, instance=PART-1-1
 4,
*Nset, nset=EqnSet-46, instance=PART-1-1
 3,
*Nset, nset=EqnSet-47, instance=PART-1-1
 1,
*Nset, nset=EqnSet-48, instance=PART-1-1
 2,
*Nset, nset=Node0, instance=PART-1-1
 1,
*Nset, nset=NodeX1, instance=PART-1-1
 2,
*Nset, nset=NodeY1, instance=PART-1-1
 3,
*Nset, nset=NodeZ1, instance=PART-1-1
 5,
*Elset, elset=RVE, instance=PART-1-1
 1,
** Constraint: Eqn-1
*Equation
4
EqnSet-1, 3, -1.
EqnSet-2, 3, 1.
EqnSet-3, 3, 1.
EqnSet-4, 3, -1.
** Constraint: Eqn-2
*Equation
4
EqnSet-5, 3, -1.
EqnSet-6, 3, 1.
EqnSet-7, 3, 1.
EqnSet-8, 3, -1.
** Constraint: Eqn-3
*Equation
4
EqnSet-9, 3, -1.
EqnSet-10, 3, 1.
EqnSet-11, 3, 1.
EqnSet-12, 3, -1.
** Constraint: Eqn-4
*Equation
4
EqnSet-13, 3, 1.
EqnSet-14, 3, -1.
EqnSet-15, 3, 1.
EqnSet-16, 3, -1.
** Constraint: Eqn-5
*Equation
4
EqnSet-17, 2, -1.
EqnSet-18, 2, 1.
EqnSet-19, 2, 1.
EqnSet-20, 2, -1.
** Constraint: Eqn-6
*Equation
4
EqnSet-21, 2, -1.
EqnSet-22, 2, 1.
EqnSet-23, 2, 1.
EqnSet-24, 2, -1.
** Constraint: Eqn-7
*Equation
4
EqnSet-25, 2, -1.
EqnSet-26, 2, 1.
EqnSet-27, 2, 1.
EqnSet-28, 2, -1.
** Constraint: Eqn-8
*Equation
4
EqnSet-29, 2, 1.
EqnSet-30, 2, -1.
EqnSet-31, 2, 1.
EqnSet-32, 2, -1.
** Constraint: Eqn-9
*Equation
4
EqnSet-33, 1, -1.
EqnSet-34, 1, 1.
EqnSet-35, 1, 1.
EqnSet-36, 1, -1.
** Constraint: Eqn-10
*Equation
4
EqnSet-37, 1, -1.
EqnSet-38, 1, 1.
EqnSet-39, 1, 1.
EqnSet-40, 1, -1.
** Constraint: Eqn-11
*Equation
4
EqnSet-41, 1, -1.
EqnSet-42, 1, 1.
EqnSet-43, 1, 1.
EqnSet-44, 1, -1.
** Constraint: Eqn-12
*Equation
4
EqnSet-45, 1, 1.
EqnSet-46, 1, -1.
EqnSet-47, 1, 1.
EqnSet-48, 1, -1.
*End Assembly
**
** ELEMENT CONTROLS
**
*Section Controls, name=EC-1, hourglass=ENHANCED
1., 1., 1.
*Amplitude, name=Amp-1, definition=SMOOTH STEP
             0.,              0.,              1.,              1.
**
** MATERIALS
**
*include, input=material.inp
**
** BOUNDARY CONDITIONS
**
** Name: Node0 Type: Displacement/Rotation
*Boundary
Node0, 1, 1
Node0, 2, 2
Node0, 3, 3
** Name: NodeX1 Type: Displacement/Rotation
*Boundary
NodeX1, 2, 2
** Name: NodeY1 Type: Displacement/Rotation
*Boundary
NodeY1, 3, 3
** Name: NodeZ1 Type: Displacement/Rotation
*Boundary
NodeZ1, 1, 1
** ----------------------------------------------------------------
**
** STEP: Step-1
**
*Step, name=Step-1, nlgeom=YES
*Dynamic, Explicit
, 1000.
*Bulk Viscosity
0.06, 1.2
** Mass Scaling: Semi-Automatic
**               Whole Model
*Fixed Mass Scaling, dt=0.001, type=uniform
**
** BOUNDARY CONDITIONS
**
** Name: Load Type: Velocity/Angular velocity
*Boundary, amplitude=Amp-1, type=VELOCITY
NodeX1, 1, 1, 0.001
**
** OUTPUT REQUESTS
**
*Restart, write, number interval=1, time marks=NO
**
** FIELD OUTPUT: F-Output-1
**
*Output, field, number interval=10
*Node Output
A, U, V
*Element Output, directions=YES
SDV,
**
** HISTORY OUTPUT: H-Output-5
**
*Output, history, time interval=1.
*Element Output, elset=PART-1-1.GRAIN-SET-1
SDV,
**
** HISTORY OUTPUT: H-Output-1
**
*Node Output, nset=Node0
RF1, RF2, RF3
**
** HISTORY OUTPUT: H-Output-2
**
*Node Output, nset=NodeX1
RF2, U1
**
** HISTORY OUTPUT: H-Output-3
**
*Node Output, nset=NodeY1
RF3, U2
**
** HISTORY OUTPUT: H-Output-4
**
*Node Output, nset=NodeZ1
RF1, U3
*End Step
